// SBML level 2 version 3

function Constant_flux__irreversible(v)
  v;
end
Constant_flux__irreversible is "Constant flux (irreversible)";

model New_Model()

  // Compartments:
  compartment cell = 5;

  // Species:
  species $glucose in cell = 10;
  species glucose_6_phosphate in cell = 0; glucose_6_phosphate is "glucose-6-phosphate";
  species $ATP in cell = 10;
  species ADP in cell = 0;

  // Assignment rules:
  rateConstant := 1/4 + 2;

  // Reactions:
  hexokinase: $glucose + $ATP => glucose_6_phosphate + ADP; cell*Constant_flux__irreversible(v);
    v = 0.5;
  hexokinase_backwards: glucose_6_phosphate + ADP => $glucose + $ATP; cell*k1*glucose_6_phosphate*ADP; hexokinase_backwards is "hexokinase-backwards";
    k1 = 1;

  // Unit definitions:
  unit volume = 1e-6 litre;
  unit substance = 1e-9 mole;
end
